# Geburtsdatum: 08.08.2003
P := 4 kW
n := 200/60*s^-1
test
ω := 2*π*n = 20.944 1/s
τ_zul := 18 N/mm^2
P == M*ω
M_T := P/ω = 190986 N*mm
d_min := nthroot(M_T/(0.2*τ_zul), 3) = 37.5751 mm
# Berechnung des Mindestdurchmessers:
d_w := 40 mm
v := 5 m/s
P == F_K*v
F_K := P/v = 800 N
b := 12 mm
h := 8 mm  # (TBM S.247)
l := 28 mm
l_k := 1.5*l = 42 mm
l_a := 6*l_k = 252 mm
M_B := F_K*l_k = 33600 N*mm
W_B := 0.1*d_w^3 = 6400 mm^3  # (Decker Tab. 15.2 für Passfeder)
σ_b := M_B/W_B = 5.25 N/mm^2
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